# OpenSim document version 40000
MarkerSet:
  Marker RWRB: radius_r (-0.0106644 -0.2272878 -0.01638926)
  Marker RWRA: radius_r (-0.001780935 -0.230174 0.03876783)
  Marker RELB: humerus_r (0.009230312 -0.2782035 0.02713407)
  Marker RMELB: humerus_r (0.003116888 -0.2821744 -0.03570527)
  Marker RSHO: torso (0.008824646 0.4065777 0.1471127)
  Marker LSHO: torso (0.007219103 0.4060107 -0.1475992)
  Marker CLAV: torso (0.02173329 0.3840162 -0.00104288)
  Marker STRN: torso (0.09063217 0.2144054 0.0002880432)
  Marker C7: torso (-0.06573236 0.3892969 -0.0001799448)
  Marker T10: torso (-0.07397441 0.1425894 -0.0006972537)
  Marker RBAK: torso (-0.08730387 0.2874813 0.1079239)
  Marker LELB: humerus_l (0.01255896 -0.2793755 -0.02637664)
  Marker LMELB: humerus_l (0.001469145 -0.2815655 0.03537903)
  Marker LWRA: radius_l (-0.00390572 -0.2292884 -0.03936994)
  Marker LWRB: radius_l (-0.01174189 -0.2301987 0.01390407)
  Marker RFIN: hand_r (-0.009035673 -0.0774303 -0.001198428)
  Marker LFIN: hand_l (-0.01185285 -0.07757378 0.001686788)
  Marker LASI: pelvis (-0.02556455 0.04119895 0.1324093)
  Marker RASI: pelvis (-0.0239504 0.0432391 -0.128296)
  Marker RPSI: pelvis (-0.1475602 0.04086993 0.05727459)
  Marker LPSI: pelvis (-0.1436146 0.04120007 -0.05767464)
  Marker LFHD: head (0.09694018 0.2299583 0.0569098)
  Marker RFHD: head (0.0969402 0.229958 -0.0569098)
  Marker LBHD: head (-0.0503243 0.229958 0.0569098)
  Marker RBHD: head (-0.0503243 0.229958 -0.0569098)
  Marker RKNE: femur_r (0.01627409 -0.4217205 0.04043962)
  Marker RMKNE: femur_r (0.01042396 -0.3987266 -0.04332033)
  Marker LKNE: femur_l (0.01036551 -0.420676 -0.04650678)
  Marker LMKNE: femur_l (0.009491523 -0.3983719 0.04479242)
  Marker RANK: tibia_r (-0.0007233226 -0.4136351 0.05318897)
  Marker RMANK: tibia_r (0.006440462 -0.4031935 -0.02840432)
  Marker LANK: tibia_l (-0.003597464 -0.412971 -0.0492267)
  Marker LMANK: tibia_l (0.006744226 -0.4049891 0.03106955)
  Marker LTOE: toes_l (0.006571465 0.02256756 -0.003205222)
  Marker RTOE: toes_r (0.009466437 0.02132808 0.0002666831)
  Marker RTHI: femur_r (0.004344728 -0.2309234 0.0628825)
  Marker RTIB: tibia_r (-0.007762629 -0.2988222 0.04763937)
  Marker LTHI: femur_l (0.01072536 -0.306299 -0.05993169)
  Marker LTIB: tibia_l (0.00727917 -0.191912 -0.0566899)
  Marker LUPA: humerus_l (0.008807027 -0.08025594 -0.02141092)
  Marker LFRM: radius_l (-0.03976468 -0.09907187 0.00346896)
  Marker RUPA: humerus_r (0.01055281 -0.08429776 0.02471145)
  Marker RFRM: radius_r (-0.03894289 -0.08976478 0.0001376997)
  Marker RHEE: toes_r (-0.199725 0.05714175 -0.00878587)
  Marker LHEE: toes_l (-0.192782 0.04700649 0.005541785)
